# Worksheet setting: ORIGIN = 1
# Початкові дані :
b := 0.75
Δx := 0.05
x_1 := 1.35
x_n := 2
x := x_1, x_1 + Δx .. x_n
y(x) := atan(b*x)/(1 + sin(x)^2)
x = [1.35; 1.4; 1.45; 1.5; 1.55; 1.6; 1.65; 1.7; 1.75; 1.8; 1.85; 1.9; 1.95; 2]
y(x) = [0.40553; 0.410826; 0.41667; 0.423136; 0.430294; 0.438216; 0.446973; 0.456637; 0.467283; 0.478987; 0.491826; 0.505883; 0.52124; 0.53798]
# Швидкий графік : | Графік функції у визначеному діапазоні значень :
# [plot: y(t) vs t]
# [plot: y(x) vs x]
# Розрахуйте кількість проміжків у сітках
n_x := ((x_n + Δx) - (x_1 - Δx))/Δx = 15
n_y := (0.55 - 0.4)/0.05 = 3
# [plot: y(x) vs x]
# Застосування оператора арифметичного циклу for
ORIGIN := 1
MakeMxy(x_1, x_n, Δx) :=
    i ← 0
    for x ∈ x_1, x_1 + Δx .. x_n
        i ← i + 1
        Mxy[i, 1] ← x
        Mxy[i, 2] ← y(x)
Mxy := MakeMxy(x_1, x_n, Δx) = 0.53798
